*Heading
** Job name: Job-SimplyBeam2 Model name: SimplyBeam2
** Generated by: Abaqus/CAE 2022
*Preprint, echo=NO, model=NO, history=NO, contact=NO
**
** PARTS
**
*Part, name=Beam
*Node
      1,  -933.333313,        -150.,           0.
      2,  -933.333313,        -150.,         500.
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*Element, type=C3D8R
   1,  187, 1385, 3638, 1125,    1,   38,  657,  107
   2, 1385, 1386, 3639, 3638,   38,   39,  658,  657
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*Nset, nset=All, generate
    1,  7777,     1
*Elset, elset=All, generate
    1,  6000,     1
*Nset, nset=MidPoint
 17,
*Elset, elset=_ToPads_S5, internal
 5815, 5816, 5817, 5818, 5819, 5820
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*Elset, elset=_ToPads_S6, internal, generate
 5521,  5751,    10
*Surface, type=ELEMENT, name=ToPads
_ToPads_S5, S5
_ToPads_S6, S6
*Elset, elset=_ToLoad_S4, internal, generate
 2530,  2760,    10
*Elset, elset=_ToLoad_S6, internal, generate
 3661,  3891,    10
*Surface, type=ELEMENT, name=ToLoad
_ToLoad_S4, S4
_ToLoad_S6, S6
** Section: HmC30
*Solid Section, elset=All, material=C30
,
*End Part
**
*Part, name=Pad
*Node
      1,         100.,         150.,          50.
      2,         100.,         125.,          50.
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*Element, type=C3D8R
  1,  40,  41,  54,  53,   1,   2,  15,  14
  2,  41,  42,  55,  54,   2,   3,  16,  15
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*Node
    352,           0.,           0.,           0.
*Nset, nset=Pad-RefPt_, internal
352,
*Nset, nset=All, generate
   1,  351,    1
*Elset, elset=All, generate
   1,  192,    1
*Elset, elset=_Top_S3, internal
   1,   2,   3,   4,   5,   6
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*Surface, type=ELEMENT, name=Top
_Top_S3, S3
*Elset, elset=_Bottom_S5, internal
  13,  14,  15,  16,  17,  18
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*Surface, type=ELEMENT, name=Bottom
_Bottom_S5, S5
** Section: HmRigidSteel
*Solid Section, elset=All, material=RigidSteel
,
*End Part
**
*Part, name=ReinMesh
*Node
      1,       -2200.,         125.,         450.
      2,       -2200.,        -125.,         450.
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*Element, type=T3D2
1, 2, 1
2, 3, 2
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*Nset, nset=BottomRein
   3,   4,   5,   6,   7,   8
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*Elset, elset=BottomRein
   3,   5,  13,  16,  18,  21
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*Nset, nset=TopRein
   1,   2,   9,  10,  13,  14
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*Elset, elset=TopRein
   9,  15,  17,  19,  20,  26
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*Nset, nset=Stirrups
   1,   2,   3,   4,   5,   7
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*Elset, elset=Stirrups
   1,   2,   4,   6,   7,   8
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*Nset, nset=All, generate
   1,  135,    1
*Elset, elset=All, generate
   1,  255,    1
** Section: TrD8HPB300
*Solid Section, elset=Stirrups, material=HPB300
50.2655,
** Section: TrD18HRB400
*Solid Section, elset=BottomRein, material=HRB400
254.469,
** Section: TrD12HRB400
*Solid Section, elset=TopRein, material=HRB400
113.097,
*End Part
**
**
** ASSEMBLY
**
*Assembly, name=Assembly
**
*Instance, name=Beam1, part=Beam
*End Instance
**
*Instance, name=ReinMesh1, part=ReinMesh
          0.,           0.,          25.
*End Instance
**
*Instance, name=PadL, part=Pad
       2400.,           0.,         -50.
*End Instance
**
*Instance, name=PadR, part=Pad
      -2400.,           0.,         -50.
*End Instance
**
*Instance, name=PadTL, part=Pad
833.333333333333,           0.,         550.
833.333333333333,           0.,         550., 833.333333333333,           1.,         550.,         180.
*End Instance
**
*Instance, name=PadTR, part=Pad
-833.333333333333,           0.,         550.
-833.333333333333,           0.,         550., -833.333333333333,           1.,         550.,         180.
*End Instance
**
*Nset, nset=RpL, instance=PadL
 352,
*Nset, nset=RpR, instance=PadR
 352,
*Nset, nset=RpTL, instance=PadTL
 352,
*Nset, nset=RpTR, instance=PadTR
 352,
*Nset, nset=_PickedSet77, internal, instance=PadTL
 352,
*Nset, nset=_PickedSet77, internal, instance=PadTR
 352,
*Nset, nset=_PickedSet78, internal, instance=ReinMesh1, generate
   1,  135,    1
*Elset, elset=_PickedSet78, internal, instance=ReinMesh1, generate
   1,  255,    1
*Nset, nset=_PickedSet79, internal, instance=Beam1, generate
    1,  7777,     1
*Elset, elset=_PickedSet79, internal, instance=Beam1, generate
    1,  6000,     1
*Elset, elset=_BCPads_S3, internal, instance=PadL
   1,   2,   3,   4,   5,   6
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*Elset, elset=_BCPads_S3, internal, instance=PadR
   1,   2,   3,   4,   5,   6
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*Surface, type=ELEMENT, name=BCPads
_BCPads_S3, S3
*Elset, elset=_LoadPads_S3, internal, instance=PadTL
   1,   2,   3,   4,   5,   6
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*Elset, elset=_LoadPads_S3, internal, instance=PadTR
   1,   2,   3,   4,   5,   6
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*Surface, type=ELEMENT, name=LoadPads
_LoadPads_S3, S3
** Constraint: Cg-RpL
*Coupling, constraint name=Cg-RpL, ref node=RpL, surface=PadL.Bottom
*Kinematic
** Constraint: Cg-RpR
*Coupling, constraint name=Cg-RpR, ref node=RpR, surface=PadR.Bottom
*Kinematic
** Constraint: Cg-RpTL
*Coupling, constraint name=Cg-RpTL, ref node=RpTL, surface=PadTL.Bottom
*Kinematic
** Constraint: Cg-RpTR
*Coupling, constraint name=Cg-RpTR, ref node=RpTR, surface=PadTR.Bottom
*Kinematic
** Constraint: Em-ReinMeshBeam
*Embedded Element, host elset=_PickedSet79
_PickedSet78
** Constraint: Tie-BeamPads
*Tie, name=Tie-BeamPads, adjust=yes
BCPads, Beam1.ToPads
** Constraint: Tie-BeamPadsT
*Tie, name=Tie-BeamPadsT, adjust=yes
LoadPads, Beam1.ToLoad
*End Assembly
**
** MATERIALS
**
*Material, name=C30
*Density
 2.4e-09,
*Elastic
30000., 0.2
*Concrete Damaged Plasticity
30.,    0.1,   1.16, 0.6667,  0.005
*Concrete Compression Hardening
  11.7112,       0.
  14.4517, 0.000107
  16.5436, 0.000184
  18.0543,  0.00028
  19.0766, 0.000393
  19.7068, 0.000519
   20.033, 0.000655
  20.1296, 0.000799
  19.6441, 0.001109
  18.5505, 0.001439
  17.2369, 0.001776
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 0.593877, 0.069586
*Concrete Tension Stiffening
  2.01019,       0.
  1.88207,  5.1e-05
  1.68982,  7.6e-05
  1.51084, 0.000101
  1.35906, 0.000125
  1.23317, 0.000148
  1.12872, 0.000171
  1.04137, 0.000193
 0.967562, 0.000214
 0.904509, 0.000235
 0.850086, 0.000256
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 0.103264, 0.004629
*Concrete Compression Damage
      0.,       0.
 0.09548, 0.000107
 0.13446, 0.000184
 0.17465,  0.00028
  0.2146, 0.000393
 0.25334, 0.000519
 0.29029, 0.000655
 0.32514, 0.000799
 0.39151, 0.001109
 0.45263, 0.001439
 0.50652, 0.001776
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   0.984, 0.069586
*Concrete Tension Damage
      0.,       0.
 0.25729,  5.1e-05
 0.34845,  7.6e-05
 0.42372, 0.000101
 0.48469, 0.000125
 0.53433, 0.000148
 0.57523, 0.000171
 0.60937, 0.000193
 0.63824, 0.000214
 0.66295, 0.000235
 0.68433, 0.000256
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 0.97284, 0.004629
*Material, name=HPB300
*Density
 7.85e-09,
*Elastic
210000., 0.3
*Plastic
300.,  0.
420., 0.1
*Material, name=HRB400
*Density
 7.85e-09,
*Elastic
200000., 0.3
*Plastic
400.,  0.
540., 0.1
*Material, name=RigidSteel
*Density
 7.85e-09,
*Elastic
210000., 0.3
**
** BOUNDARY CONDITIONS
**
** Name: BC-L Type: 位移/转角
*Boundary
RpL, 1, 1
RpL, 2, 2
RpL, 3, 3
RpL, 4, 4
RpL, 6, 6
** Name: BC-R Type: 位移/转角
*Boundary
RpR, 2, 2
RpR, 3, 3
RpR, 4, 4
RpR, 6, 6
** ----------------------------------------------------------------
**
** STEP: Step-1
**
*Step, name=Step-1, nlgeom=NO, inc=10000
*Static
0.01, 0.2, 1e-06, 0.2
**
** LOADS
**
** Name: Load-G   Type: Gravity
*Dload
, GRAV, 9810., 0., 0., -1.
**
** OUTPUT REQUESTS
**
*Restart, write, frequency=0
**
** FIELD OUTPUT: F-Output-1
**
*Output, field
*Node Output
U,
*Element Output, directions=YES
DAMAGEC, DAMAGET, E, S
**
** HISTORY OUTPUT: H-Output-1
**
*Output, history
*Node Output, nset=Beam1.MidPoint
U3,
**
** HISTORY OUTPUT: H-Output-2
**
*Node Output, nset=RpL
RF3,
**
** HISTORY OUTPUT: H-Output-3
**
*Node Output, nset=RpR
RF3,
*End Step
** ----------------------------------------------------------------
**
** STEP: Step-2
**
*Step, name=Step-2, nlgeom=NO, inc=10000
*Static
0.01, 1., 1e-06, 1.
**
** LOADS
**
** Name: Load-CF   Type: Concentrated force
*Cload
_PickedSet77, 3, -120000.
**
** OUTPUT REQUESTS
**
*Restart, write, frequency=0
**
** FIELD OUTPUT: F-Output-1
**
*Output, field
*Node Output
U,
*Element Output, directions=YES
DAMAGEC, DAMAGET, E, S
**
** HISTORY OUTPUT: H-Output-1
**
*Output, history
*Node Output, nset=Beam1.MidPoint
U3,
**
** HISTORY OUTPUT: H-Output-2
**
*Node Output, nset=RpL
RF3,
**
** HISTORY OUTPUT: H-Output-3
**
*Node Output, nset=RpR
RF3,
*End Step
